# AguaClara Water Treatment Plants
# Automated Design
# Add variable descriptions next to every varible so it is easy to interpret what this all means.
# Design References
# MathCAD dimension calculations:
# [reference: BasicInputs.xmcd]
# Use BasicClientInputs and ExpertClientInputs when this is run by LabVIEW.
# Use BasicInputs and ExpertInputs to use the program in MathCAD
# Change the reference by
# - right clicking
# - select properties
# - reference tab
# - type in the correct file name
# [reference: ExpertInputs.xmcd]
# [reference: DesignAssumptions.xmcd]
# [reference: MathFunctions.xmcd]
# [reference: PipeDatabase.xmcd]
# [reference: MinorLossCoefficients.xmcd]
# [reference: FluidsFunctions.xmcd]
# [reference: Sedimentation Tank.xmcd]
# [reference: Flocculator.xmcd]
# [reference: Rapid Mix.xmcd]
# [reference: LFOM.xmcd]
# [reference: EntranceTankDim.xmcd]
# [reference: Chemical Doser temp.xmcd]
# [reference: ChemStorageCylinders.xmcd]
# [reference: Materials List.xmcd]
# AutoCAD drawing programs:
# Translators:
# These are the codes that take MathCAD outputs and create AutoCAD scripts that are used to draw the plant (formerly Basics)
# [reference: MtoATranslators.xmcd]
# The wrapped MtoA translator contains the functions that the user will want to access. These functions will draw pieces with full functionality - specifying the location, dimension, and orientation of the object. Also, it contains layer control and subtraction capabilities for grouped objects.
# [reference: MtoATranslators Wrapped.xmcd]
# Plant Elements:
# These are all of the files that draw the fundamental parts of the plants (tees, elbows, tanks, pipes, etc)
# [reference: Channel.xmcd]
# [reference: cross.xmcd]
# [reference: Sludge.xmcd]
# [reference: Manifold.xmcd]
# [reference: pipe.xmcd]
# [reference: elbow.xmcd]
# [reference: Tee.xmcd]
# [reference: tank.xmcd]
# [reference: lamina.xmcd]
# [reference: adapter.xmcd]
# [reference: Tee2.xmcd]
# [reference: pvccap.xmcd]
# [reference: LaunderCap.xmcd]
# [reference: ChimneyStops.xmcd]
# [reference: laminaplain.xmcd]
# [reference: Stairs.xmcd]
# [reference: Drain Channel.xmcd]
# Specific Pieces:
# These are the codes that draw the bigger pieces of the plant (the sed tank, floc tank, etc)
# [reference: floctank.xmcd]
# [reference: chlorinestock.xmcd]
# [reference: SedTank- with pieces.xmcd]
# [reference: Entrance Tank.xmcd]
# [reference: AlumstockCylinder.xmcd]
# [reference: Plant Drain Channel.xmcd]
# [reference: Operator Access.xmcd]
# Layouts:
# This file will execute at the very end to create multiple views of the entire plant in paperspace
# [reference: Layouts.xmcd]
# Sed Tanks and Slopes:
N_SedTanks = 2
H_SedBetween = 12.5131 cm  # Distance from the top of the inlet manifold to the bottom of the ledge supporting the lamella frame
L_Sed = 8.88366 m
N_SedBays = 2  # Number of bays of inlet manifolds in each sed tank
# Length of the port through which water exits the inlet manifold
# Width of ferrous cement plates in whice one manifold port is cut
Q_SedBay = 7.5 L/s
# Sedimentation Tank Sludge Drain:
N_SedSludgeOrifices = 88  # per cell
Ti_SludgeDrain = 30 min  # Tank Drain time
W_SedSludge = 14.6675 cm  # Width of the sludge channel
B_SedSludgeOrifices = 10 cm  # Distance center to center between drain orifices
H_SedSludge = 7.33374 cm  # Depth of the sludge channel
T_SedSludge = 5 cm
T_SedSludge = 5 cm
# Thickness of the plate topping the sludge channel
# through which drain holes are formed
W_SedDrainCover = 24.6675 cm
D_SedSludgeOrifice = 0.01 m  # Diameter of drain orifices
W_SedInletBottom = 0.416663 m
N_SedSludgeOrifices = 88
ND_SedSludgeValve = 4 in
# Sedimentation Tank Dimensions:
Z_SedSludge = 0.123337 m  # Height from 0 of the top of the sludge drain
Z_SedSlopes = 0.801717 m  # Height from 0 of the top of the inlet manifold
W_Sed = 2.16 m  # Total tank wall height
L_Sed = 8.88366 m  # Total tank length
# Inlet Channel:
HW_InletChannel = 0.378977 m  # Width of the drop chimneys connecting channel to sed inlet manifolds
W_InletChannel = 0.61322 m  # length of drop chimmneys
L_Channel = 4.77 m
N_SedInletPipes = 2  # per sed bay
H_InletChannel = 0.478977 m
# Sedimentation Tank Effluent Launder:
N_SedLaunderOrifices = 144  # Number of orifices per launder
Q_SedLaunderOrifices = 5.2157e-5 m^3/s  # More Launder Dimensions
ND_SedLaunder = 8 in
B_SedLaunderOrifices = 0.0985507 m  # Center to center launder spacing
L_SedLaunder = 7.24562 m
# Exit Channel:
D_SedLaunderOrifice = 0.433071 in
W_ExitChannel = 0.580125 m
H_ExitChannel = 0.478977 m
L_ExitChannel = 4.77 m
H_PltWeir = 0.388977 m  # height of the weir carrying water to the distribution tank
HW_ExitChannel = 0.338977 m  # water height in exit channel from 0
# Lamella:
L_SedPlate = 0.45725 m
B_SedPlate = 2.72089 cm  # center to center distance between lamella
S_SedPlate = 2.52089 cm  # spacing between lamella
N_SedPlates = 231  # Number of Sed Plates per Sedimentation Tank Bay.
AN_SedPlate = 60 deg
V_SedC = 10.0779 m/day
L_SedActive = 7.25758 m
T
V_SedUp = 67.5398 m/day
Z_SedLaunder = 1.57064 m
H_SedPlate = 0.39599 m
H_SedAbove = 0.257769 m  # Height of water needed above the lamella
N_SedPlates = 231
HW_Sed = 1.71887 m
H_Sed = 1.81887 m
Z_Mp = 1.33989 m
H_SedBayDivider = 0.926847 m
# Flocculator: | Look at Flocculator Positioning arrays
W_FlocChannel = 0.6 m
# Fill last channel with bafffles from last channel
# Fix port width to be based on energy dissipation in that channel
ED_Floc = 6 mW/kg
# Adjust spacing after the number of baffles per channel is known.
# Check the residence time of the flocculator should be at least 20minutes
HW_FlocEnd = 1.71887 m
X_FlocBaffles = [
    0.333916, 0.333916, 0.46862;
    0.649833, 0.649833, 0.791785;
    0.965749, 0.965749, 1.11495;
    1.28167, 1.28167, 1.43811;
    1.59758, 1.59758, 1.76128;
    1.9135, 1.9135, 2.08444;
    2.22941, 2.22941, 2.40761;
    2.54533, 2.54533, 2.73077;
    2.86125, 2.86125, 3.05394;
    3.17716, 3.17716, 3.3771;
    3.49308, 3.49308, 3.70027;
    3.809, 3.809, 4.02343;
    4.12491, 4.12491, 4.3466;
    4.44083, 4.44083, 4.66976;
    4.75674, 4.75674, 4.99293;
    5.07266, 5.07266, 5.31609;
    5.38858, 5.38858, 5.63926;
    5.70449, 5.70449, 5.96242;
    6.02041, 6.02041, 6.28559;
    6.33633, 6.33633, 6.60875;
    6.65224, 6.65224, 6.93192;
    6.96816, 6.96816, 7.25508;
    7.28408, 7.28408, 7.57825;
    7.59999, 7.59999, 7.90141;
    7.91591, 7.91591, 8.22458;
    8.23182, 8.23182, 8.54774;
    8.54774, 8.54774, 0
] m
L_FlocBaffles = [
    1.40495, 1.40495, 1.66655;
    1.66655, 1.66655, 1.40495;
    1.40495, 1.40495, 1.66655;
    1.66655, 1.66655, 1.40495;
    1.40495, 1.40495, 1.66655;
    1.66655, 1.66655, 1.40495;
    1.40495, 1.40495, 1.66655;
    1.66655, 1.66655, 1.40495;
    1.40495, 1.40495, 1.66655;
    1.66655, 1.66655, 1.40495;
    1.40495, 1.40495, 1.66655;
    1.66655, 1.66655, 1.40495;
    1.40495, 1.40495, 1.66655;
    1.66655, 1.66655, 1.40495;
    1.40495, 1.40495, 1.66655;
    1.66655, 1.66655, 1.40495;
    1.40495, 1.40495, 1.66655;
    1.66655, 1.66655, 1.40495;
    1.40495, 1.40495, 1.66655;
    1.66655, 1.66655, 1.40495;
    1.40495, 1.40495, 1.66655;
    1.66655, 1.66655, 1.40495;
    1.40495, 1.40495, 1.66655;
    1.66655, 1.66655, 1.40495;
    1.40495, 1.40495, 1.66655;
    1.66655, 1.66655, 1.40495;
    1.40495, 1.40495, 0
] m
Z_FlocBaffles = [
    0, 0, 0.321165;
    0.313916, 0.313916, 0;
    0, 0, 0.321165;
    0.313916, 0.313916, 0;
    0, 0, 0.321165;
    0.313916, 0.313916, 0;
    0, 0, 0.321165;
    0.313916, 0.313916, 0;
    0, 0, 0.321165;
    0.313916, 0.313916, 0;
    0, 0, 0.321165;
    0.313916, 0.313916, 0;
    0, 0, 0.321165;
    0.313916, 0.313916, 0;
    0, 0, 0.321165;
    0.313916, 0.313916, 0;
    0, 0, 0.321165;
    0.313916, 0.313916, 0;
    0, 0, 0.321165;
    0.313916, 0.313916, 0;
    0, 0, 0.321165;
    0.313916, 0.313916, 0;
    0, 0, 0.321165;
    0.313916, 0.313916, 0;
    0, 0, 0.321165;
    0.313916, 0.313916, 0;
    0, 0, 0
] m
N_FlocChannels = 3
L_FlocTank = 26.651 m
HL_Floc = 21.1601 cm
HW_FlocStart = 1.93047 m
S_FlocBaffle = [31.3916; 31.3916; 32.1165] cm
B_FlocBaffle = [31.5916; 31.5916; 32.3165] cm
N_FlocChannelBaffles = [27; 27; 26]
W_FlocPort = [0.313916; 0.313916; 0.327098] m
HL_FlocChannels = [7.24352; 7.24352; 6.67309] cm
L_FlocBaffleLower = 1.40495 m
L_FlocBaffleUpper = 1.66655 m
H_FlocPort = [0.6; 0.6; 0.589116] m
Ti_Floc = 15.2698 min  # residence time of the flocculator
N_FlocBaffles = 80
# Materials List:
N_Launders = 4
L_LaunderPipeTotal = 28.9825 m
N_Valves = 4
N_LaunderCouplings = 4
N_ValveCouplings = 4
N_SedPlatesTotal = 924
N_SedPlatesPerSheet = 8
N_SedPlateSheets = 116
AC_SedTank =  # no stored result
AC_EntranceTank =  # no stored result
AC_FlocTank = [
    "-layer m FlocTank"; "c t 132,132,132"; "FlocTank"; "  "; "_-view o t _zoom w 0.16,4.46,0 -9.04366,6.88,2.03047 _box 0,4.62,0 -8.88366,6.72,2.03047 _box 0.15,4.47,-0.15 -9.03366,6.87,2.03047 _subtract 0.15,4.47,-0.15  0,4.62,0 "; "_box -9.03366,5.22,0 0.15,5.37,2.03047"; "_box -9.03366,5.97,0 0.15,6.12,2.03047"; "-group c FlocTank y "; "all "; "-layer s 0"
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]
AC_ChemTanks = ["-layer m alumtanks"; "c t 132,132,132"; "alumtanks"; "  "; "_-view o t"; "_cylinder 8.69946,7.70807,3.06421 0.61697 1.8409"; "_cylinder 8.69946,7.70807,3.06921 0.61197 1.8359"; "_-view o t"; "_subtract 8.08249,7.70807,3.06421  8.08749,7.70807,3.06421 "; "_mirror all  8.68946,7.04111 8.70946,7.04111 "; "_union all "; "-layer s 0"; "  "; "-layer f alumtanks"; "  "]
AC_OperatorAccess = [
    "-layer m Walkway";
    "c t 132,132,132";
    "Walkway";
    "  ";
    "_box 0.15,0,1.31887 1.65,6.87,1.61887";
    "-group c Walkway y ";
    "all ";
    "-layer s 0";
    "  ";
    "-layer f Walkway";
    "  ";
    "_box 0.15,1.5311,1.31887 0.4167,1.7089,1.61887";
    "_box 0.15,0.4511,1.31887 0.4167,0.6289,1.61887";
    "-array all  R 2 1 2.31";
    "_box 0.15,4.8057,1.31887 0.4929,5.0343,1.61887";
    "_box 0.15,6.3057,1.31887 0.4929,6.5343,1.61887";
    "-group c DeleteMe y ";
    "all ";
    "-layer t Walkway";
    "  ";
    "_subtract";
    "g Walkway";
    " g DeleteMe ";
    "-layer f Walkway";
    "  "
]
AC_DrainChannel = [
    "-layer m DrainChannel"; "c t 214,214,214"; "DrainChannel"; "  "; "3dpoly"; "0.03678,-1.22644,-0.3"; "0.03678,-1.22644,-0.56945"; "0.49339,-1.22644,-0.87606"; "0.95,-1.22644,-0.56945"; "0.95,-1.22644,-0.3"
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]
